*Heading
** Job name: Opt-Process-1-Job Model name: optimisation_renfort_interne
** Generated by: Abaqus/CAE 2017
*Preprint, echo=NO, model=NO, history=NO, contact=NO
** ----------------------------------------------------------------
**
** PART INSTANCE: assemblage
**
*Node
      1,          16.,          16.,           0.
      2,          40.,          16.,           0.
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*Element, type=S4R
   1,    1,   10,  872,  110
   2,   10,   11,  873,  872
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*Element, type=S3
12727, 13272, 12909, 12874
12728, 13448, 13261, 13268
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*Nset, nset=assemblage_point_analyse
 8,
*Nset, nset=assemblage_Set-2
     1,     2,     3,     4,     5,     6
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*Elset, elset=assemblage_Set-2
     1,     2,     3,     4,     5,     6
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*Nset, nset=assemblage_Set-5, generate
     1,  20319,      1
*Elset, elset=assemblage_Set-5, generate
     1,  20627,      1
** Section: Section-1
*Shell Section, elset=assemblage_Set-5, material=Titane
1., 5
*System
*Nset, nset=Set-5, generate
     1,  20319,      1
*Elset, elset=Set-5, generate
     1,  20627,      1
*Nset, nset=Set-6, generate
     1,  20319,      1
*Elset, elset=Set-6, generate
     1,  20627,      1
*Nset, nset=s_Set-7, generate
     1,  20319,      1
*Elset, elset=s_Set-7, generate
     1,  20627,      1
*Nset, nset=_PickedSet3
     7,     8,   652,   653,   654,   655
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*Elset, elset=_PickedSet3, generate
 17107,  18773,      1
*Nset, nset=_PickedSet4
     1,     2,     3,     4,     5,     6
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*Elset, elset=_PickedSet4
     1,     2,     3,     4,     5,     6
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*Nset, nset=_PickedSet5
     1,     9,    10,    11,    12,    13
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*Elset, elset=_PickedSet5, generate
 18774,  20627,      1
*Nset, nset=_PickedSet6
    4,    7,  333,  334,  335,  336
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*Elset, elset=_PickedSet6, generate
 4647,  8888,     1
*Elset, elset=__PickedSurf7_SPOS, generate
 17107,  18773,      1
*Surface, type=ELEMENT, name=_PickedSurf7
__PickedSurf7_SPOS, SPOS
*Elset, elset=__PickedSurf8_SPOS
     1,     2,     3,     4,     5,     6
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*Surface, type=ELEMENT, name=_PickedSurf8
__PickedSurf8_SPOS, SPOS
*Elset, elset=__PickedSurf9_SPOS, generate
 18774,  20627,      1
*Surface, type=ELEMENT, name=_PickedSurf9
__PickedSurf9_SPOS, SPOS
*Elset, elset=__PickedSurf10_SPOS, generate
 4647,  8888,     1
*Surface, type=ELEMENT, name=_PickedSurf10
__PickedSurf10_SPOS, SPOS
**
** MATERIALS
**
*Material, name=Titane
*Elastic
 1.138e+11, 0.342
** ----------------------------------------------------------------
**
** STEP: Step-1
**
*Step, name=Step-1, nlgeom=NO
*Static
0.1, 1., 1e-05, 0.1
**
** BOUNDARY CONDITIONS
**
** Name: Contrainte_rotation_1 Type: Displacement/Rotation
*Boundary
_PickedSet3, 4, 4
_PickedSet3, 5, 5
_PickedSet3, 6, 6
** Name: Contrainte_rotation_2 Type: Displacement/Rotation
*Boundary
_PickedSet4, 4, 4
_PickedSet4, 5, 5
_PickedSet4, 6, 6
** Name: Contrainte_rotation_3 Type: Displacement/Rotation
*Boundary
_PickedSet5, 4, 4
_PickedSet5, 5, 5
_PickedSet5, 6, 6
** Name: Contrainte_rotation_4 Type: Displacement/Rotation
*Boundary
_PickedSet6, 4, 4
_PickedSet6, 5, 5
_PickedSet6, 6, 6
**
** LOADS
**
** Name: Pression_1   Type: Pressure
*Dsload
_PickedSurf7, P, 1.23046e+07
** Name: Pression_2   Type: Pressure
*Dsload
_PickedSurf8, P, 1.23046e+07
** Name: Pression_3   Type: Pressure
*Dsload
_PickedSurf9, P, 1.23046e+07
** Name: Pression_4   Type: Pressure
*Dsload
_PickedSurf10, P, 1.23046e+07
**
** OUTPUT REQUESTS
**
*Restart, write, frequency=0
**
** FIELD OUTPUT: F-Output-1
**
*Output, field, variable=PRESELECT
**
** HISTORY OUTPUT: H-Output-1
**
*Output, history, variable=PRESELECT
*End Step
